// SBML level 2 version 4
// dcterms:bibliographicCitation: urn:miriam:pubmed:10951190

function Zymomonas_Pyruvate_decarboxylase__1(Vmax, PYR, KmPYR)
  Vmax*(PYR/KmPYR)/(1 + PYR/KmPYR);
end
Zymomonas_Pyruvate_decarboxylase__1 is "Zymomonas Pyruvate decarboxylase [1]";

function Zymomonas_Adenylate_Kinase(Vf, KmADP, ADP, ATP, AMP, Keq, KmATP, KmAMP)
  Vf/KmADP^2*(ADP^2 - ATP*AMP/Keq)/((1 + ADP/KmADP + ATP/KmATP)*(1 + ADP/KmADP + AMP/KmAMP));
end

function Henri_Michaelis_Menten__irreversible(substrate, Km, V)
  V*substrate/(Km + substrate);
end
Henri_Michaelis_Menten__irreversible is "Henri-Michaelis-Menten (irreversible)";

function Zymomonas_Acetaldehyde_export_3__1___1(v, ACETcy, ACETper)
  v*(ACETcy/ACETper - 1);
end
Zymomonas_Acetaldehyde_export_3__1___1 is "Zymomonas Acetaldehyde export 3 [1] [1]";

function Zymomonas_ATP_ase__1(V, ATP, KmATP)
  V*ATP/(KmATP + ATP);
end
Zymomonas_ATP_ase__1 is "Zymomonas ATP-ase [1]";

function Zymomonas_3_phosphoglycerate_kinase(Vf, KmbPG, KmADP, bPG, ADP, P3G, ATP, Keq, KmP3G, KmATP)
  Vf/(KmbPG*KmADP)*(bPG*ADP - P3G*ATP/Keq)/((1 + bPG/KmbPG + P3G/KmP3G)*(1 + ADP/KmADP + ATP/KmATP));
end
Zymomonas_3_phosphoglycerate_kinase is "Zymomonas 3-phosphoglycerate kinase";

function Zymomonas_Phosphoglycerate_mutase(Vf, KmP3G, P3G, P2G, KeqPGM, KmP2G)
  Vf/KmP3G*(P3G - P2G/KeqPGM)/(1 + P3G/KmP3G + P2G/KmP2G);
end

function Zymomonas_6_P_gluconate_dehydratase(Vf, PGLUCONATE, KmPGLUCONATE, P3G, KiP3G)
  Vf*(PGLUCONATE/(KmPGLUCONATE*(1 + P3G/KiP3G)))/(1 + PGLUCONATE/(KmPGLUCONATE*(1 + P3G/KiP3G)));
end
Zymomonas_6_P_gluconate_dehydratase is "Zymomonas 6-P-gluconate dehydratase";

function Zymomonas_Glucose_Fascilitator(Vf, KmGLUCex, GLUCex, GLUCcy, Keq, KmGLUCcy)
  Vf/KmGLUCex*(GLUCex - GLUCcy/Keq)/(1 + GLUCex/KmGLUCex + GLUCcy/KmGLUCcy);
end

function Zymomonas_6_Phosphogluconolactonase(Vf, KmPGLACTON, GLUC6P, KiGLUC6P, PGLACTON, Keq, PGLUCONAT, KmPGLUCONAT)
  Vf/(KmPGLACTON*(1 + GLUC6P/KiGLUC6P))*(PGLACTON - PGLUCONAT/Keq)/(1 + PGLACTON/(KmPGLACTON*(1 + GLUC6P/KiGLUC6P)) + PGLUCONAT/KmPGLUCONAT);
end
Zymomonas_6_Phosphogluconolactonase is "Zymomonas 6-Phosphogluconolactonase";

function Zymomonas_Alcohol_dehydrogenase__1(Vf, NADH, ACET, KiNADH, KmACET, KmNAD, NAD, ETOH, Keq, KmNADH, KiNAD, KmETOH)
  (Vf*NADH*ACET/(KiNADH*KmACET) - Vf*KmNAD*NAD*ETOH/(Keq*KmNADH*KmACET*KiNAD))/(1 + NADH/KiNADH + KmNADH*ACET/(KiNADH*KmACET) + NADH*ACET/(KiNADH*KmACET) + NAD/KiNAD + KmNAD*ETOH/(KmETOH*KiNAD) + ETOH*NAD/(KmETOH*KiNAD));
end
Zymomonas_Alcohol_dehydrogenase__1 is "Zymomonas Alcohol dehydrogenase [1]";

function Zymomonas_Glucose_6_Phosphate_dehydrogenase__1(Vf, GLUC6P, KmGLUC6P, NAD, KmNAD, PGLACTON, NADH, Keq, KmPGLACTON, h, KmNADH, PEP, KiPEP, s, ATP, KmATP)
  Vf*(GLUC6P/KmGLUC6P)*(NAD/(KmNAD*(1 + ATP/KmATP)))*(1 - PGLACTON*NADH/(GLUC6P*NAD*Keq))*(GLUC6P/KmGLUC6P + PGLACTON/KmPGLACTON)^(h - 1)*(NAD/(KmNAD*(1 + ATP/KmATP)) + NADH/KmNADH)^(h - 1)/(((1 + (PEP/KiPEP)^h)/(1 + s^(4*h)*(PEP/KiPEP)^h) + (1 + s^(2*h)*(PEP/KiPEP)^h)/(1 + s^(4*h)*(PEP/KiPEP)^h))*((GLUC6P/KmGLUC6P + PGLACTON/KmPGLACTON)^h + (NAD/(KmNAD*(1 + ATP/KmATP)) + NADH/KmNADH)^h) + (GLUC6P/KmGLUC6P + PGLACTON/KmPGLACTON)^h*(NAD/(KmNAD*(1 + ATP/KmATP)) + NADH/KmNADH)^h);
end
Zymomonas_Glucose_6_Phosphate_dehydrogenase__1 is "Zymomonas Glucose 6 Phosphate dehydrogenase [1]";

function Zymomonas_Enolase__1(Vf, P2G, PEP, Keq, KmP2G, KmPEP)
  Vf/KmP2G*(P2G - PEP/Keq)/(1 + P2G/KmP2G + PEP/KmPEP);
end
Zymomonas_Enolase__1 is "Zymomonas Enolase [1]";

function Zymomonas_KDPG__aldolase___1___1(Vf, KDPG, KmKDPG, GAP, PYR, Keq, KmPYR, KmGAP, KiGAP)
  (Vf*KDPG/KmKDPG - Vf*GAP*PYR/(Keq*KmKDPG))/(1 + KDPG/KmKDPG + PYR/KmPYR + GAP/KmGAP + KDPG*GAP/(KmKDPG*KiGAP) + PYR*GAP/(KmPYR*KmGAP));
end
Zymomonas_KDPG__aldolase___1___1 is "Zymomonas KDPG aldolase [1] [1]";

function Zymomonas_Pyruvate_kinase__1___1(Vf, KmPEP, KmADP, PEP, ADP, PYR, ATP, Keq, KmPYR, KmATP)
  Vf/(KmPEP*KmADP)*(PEP*ADP - PYR*ATP/Keq)/((1 + PEP/KmPEP + PYR/KmPYR)*(1 + ADP/KmADP + ATP/KmATP));
end
Zymomonas_Pyruvate_kinase__1___1 is "Zymomonas Pyruvate kinase [1] [1]";

function Zymomonas_Glucokinase__1___1(Vf, KmGLUCcy, KmATP, GLUC6P, KiGLUC6P, GLUCcy, ATP, ADP, Keq, KmGLUC6P, KmADP)
  Vf/(KmGLUCcy*KmATP*(1 + GLUC6P/KiGLUC6P))*(GLUCcy*ATP - GLUC6P*ADP/Keq)/((1 + GLUCcy/KmGLUCcy + GLUC6P/KmGLUC6P)*(1 + ATP/(KmATP*(1 + GLUC6P/KiGLUC6P)) + ADP/KmADP));
end
Zymomonas_Glucokinase__1___1 is "Zymomonas Glucokinase [1] [1]";

function Zymomonas_Ethanol_transport(k, ETOHcy, ETOXex)
  k*(ETOHcy - ETOXex);
end

function Zymomonas_Glyceraldehyde_3_phosphate_dehydrogenase(Vf, KmGAP, KmNAD, GAP, NAD, bPG, NADH, Keq, KmNADH, KmbPG)
  Vf/(KmGAP*KmNAD)*(GAP*NAD - bPG*NADH/Keq)/((1 + GAP/KmGAP + bPG/KmbPG)*(1 + NAD/KmNAD + NADH/KmNADH));
end
Zymomonas_Glyceraldehyde_3_phosphate_dehydrogenase is "Zymomonas Glyceraldehyde 3-phosphate dehydrogenase";

model Zymomonas_ED_Pathway()
  // Mathematical Definition
  // symbol/abbreviation
  // Mathematical symbols
  // Keq Equilibrium constant
  // Ki Inhibition constant
  // Km Affinity constant
  // v Predicted enzyme activities
  // Vf Maximal enzyme activities under saturating substrate and activator
  // conditions, and in the absence of inhibitors
  // h Hill coefficient
  // k Rate constant
  // Abbreviations
  // ACET Acetaldehyde
  // ADH Alcohol dehydrogenase
  // AK Adenylate kinase
  // ATPcons ATP consuming reactions
  // bPG 1,3-bisphosphoglycerate
  // ENO Enolase
  // ETOHcy Cytoplasmic ethanol
  // ETOHex Extracellular ethanol
  // ETOHexp Ethanol transport
  // GAP Glyceraldehyde 3-phosphate
  // GAPD Glyceraldehyde 3-phosphate dehydrogenase
  // GF Glucose facilitator
  // GK Glucokinase
  // GLUCcy Cytoplasmic glucose
  // GLUCex Extracellular glucose
  // GLUC6P Glucose 6-phosphate
  // GPD Glucose 6-phosphate dehydrogenase
  // KDPG 2-keto-3-deoxy-6-phosphogluconate
  // KDPGA 2-keto-3-deoxy-6-phosphogluconate aldolase
  // PDC Pyruvate decarboxylase
  // PEP Phosphoenolpyruvate
  // PGD 6-phosphogluconate dehydratase
  // PGK 3-phosphoglycerate kinase
  // PGL 6-phosphogluconolactonase
  // PGLACTON 6-phosphogluconolactone
  // PGLUCONATE 6-phosphogluconate
  // PGM Phosphoglycerate mutase
  // P3G 3-phosphoglycerate
  // P2G 2-phosphoglycerate
  // PYK Pyruvate kinase
  // PYR Pyruvate
  // GO:0019642
  // biomodels.db:MODEL6623915522
  // biomodels.db:BIOMD0000000064
  // kegg.pathway:sce00010
  // isHomologTo reactome:REACT_723
  // occursIn taxonomy:4932

  // Compartments:
  compartment extracellular = 0.00024;  // GO:0005576
  compartment cytosol = 2.4e-6;  // GO:0005829
  compartment periplasm = 2.4e-7;

  // Species:
  species ETHANOLex in extracellular = 1000.019;
  species $GLUCex in extracellular = 140000;
  species PYRex in extracellular = 321.4603;
  species ACETper in extracellular = 19123.36;
  species ACETex in extracellular = 19123.24;
  species CO2per in extracellular = 75.81008;
  species $CO2ex in extracellular = 36183.45;
  species GLCi in cytosol = 39883.54; GLCi is "GLUCcy";  // CHEBI:17234; kegg.compound:C00293
  species G6P in cytosol = 12932.51; G6P is "GLUC6P";  // kegg.compound:C00668; CHEBI:17665
  species BPG in cytosol = 47.70075; BPG is "bPG";  // CHEBI:16001; kegg.compound:C00236
  species P3G in cytosol = 7881.144;  // CHEBI:17794; kegg.compound:C00197
  species P2G in cytosol = 631.1982;  // kegg.compound:C00631; CHEBI:17835
  species PEP in cytosol = 235.4501;  // CHEBI:18021; kegg.compound:C00074
  species PYR in cytosol = 1254.1; PYR is "PYRcy";  // kegg.compound:C00022; CHEBI:15361
  species ACE in cytosol = 20141.59; ACE is "ACETcy";  // kegg.compound:C00084; CHEBI:15343
  species NAD in cytosol = 4497.789;  // kegg.compound:C00003; CHEBI:15846
  species NADH in cytosol = 2.210943;  // kegg.compound:C00004; CHEBI:16908
  species CO2 in cytosol = 75.82828; CO2 is "CO2cy";  // kegg.compound:C00011; CHEBI:16526
  species ETOH in cytosol = 1000.024; ETOH is "ETHANOLcy";  // CHEBI:16236; kegg.compound:C00469
  species ATP in cytosol = 2975.085;  // kegg.compound:C00002; CHEBI:15422
  species ADP in cytosol = 485.3286;  // kegg.compound:C00008; CHEBI:16761
  species PGLACTON in cytosol = 3452.133;
  species PGLUCONATE in cytosol = 825.5046;
  species KDPG in cytosol = 681.7441;
  species GAP in cytosol = 149.4265;
  species AMP in cytosol = 39.58607;
  species GLCo in periplasm = 140000; GLCo is "GLUCper";  // CHEBI:17234; kegg.compound:C00293
  species ETHANOLper in periplasm = 1000.021;
  species PYRper in periplasm = 321.4603;

  // Reactions:
  // Reaction Altintas et.al. 2006
  // Km Values Scopes et al 1985/1997
  // KmNAD 210
  // KmG-6-P 170
  // Vmax Ingram et al 1987
  // Vmax (1500- 6000)
  vGLK: GLCi + ATP -> G6P + ADP; cytosol*Zymomonas_Glucokinase__1___1(vGLK_Vf, vGLK_KmGLUCcy, vGLK_KmATP, G6P, vGLK_KiGLUC6P, GLCi, ATP, ADP, vGLK_Keq, vGLK_KmGLUC6P, vGLK_KmADP); vGLK is "2 Glukcokinase";  // ec-code:2.7.1.2; kegg.reaction:R00299; isHomologTo reactome:REACT_1318
    vGLK_Vf = 6263.43; vGLK_KmGLUCcy = 220; vGLK_KmATP = 800; vGLK_KiGLUC6P = 15000; vGLK_Keq = 450; vGLK_KmGLUC6P = 2607.74; vGLK_KmADP = 2458.33;
  // Vf vērtība no Osman et al 1987, Vr aprēķināts izmantojot Pawluk et. al un Altintas (Jāprecizē.)
  // Km vērtības no Altintas
  // Teusink 2000
  // Km vērtības, Izteiksme arī, Sekvence līdzīgas
  // Sacharomyces un Zymomonas.
  // >YGR192C_FostersB TDH3 ORF Verified [Sc strain FostersB]
  // Glyceraldehyde-3-phosphate dehydrogenase, isozyme 3, involved in glycolysis and gluconeogenesis; tetramer that catalyzes the reaction of glyceraldehyde-3-phosphate to 1,3 bis-phosphoglycerate; detected in the cytoplasm and cell wall
  // Length = 333
  // Score = 293.0 bits (818), Expect = 6.1e-82, P = 6.1e-82
  // Identities = 171/335 (51%), Positives = 225/335 (67%), Gaps = 7/335 (2%)
  // Query: 3 VKVAINGFGRIGRLAARAILSRPDSGLELVTIND-LGSVEGNAFLFKRDSAHGTYPGTVT 61
  // V+VAINGFGRIGRL R LSRP+ +E+V +ND + + A++FK DS HG Y G V+
  // Sbjct: 2 VRVAINGFGRIGRLVMRIALSRPN--VEVVALNDPFITNDYAAYMFKYDSTHGRYAGEVS 59
  // Query: 62 TEGNDMVIDGKKIVVTAERDPANLPHKKLGVDIVMECTGIFTNTEKASAHLTAGAKKVLI 121
  // + +++DGKKI ERDPANLP VDI ++ TG+F + A H+ AGAKKV+I
  // Sbjct: 60 HDDKHIIVDGKKIATYQERDPANLPWGSSNVDIAIDSTGVFKELDTAQKHIDAGAKKVVI 119
  // Query: 122 SAPAKGDVDRTVVYGVNHKDLTADDKIVSNASCTTNCLAPVLHVLQQKIGIVRGLMTTVH 181
  // +AP+ V GVN + T+D KIVSNASCTTNCLAP+ V+ GI GLMTTVH
  // Sbjct: 120 TAPSS--TAPMFVMGVNEEKYTSDLKIVSNASCTTNCLAPLAKVINDAFGIEEGLMTTVH 177
  // Query: 182 SFTNDQRILD-QIHSDLRRARTASASMIPTSTGAARAVALVIPELKGKLDGISIRVPTPD 240
  // S T Q+ +D H D R RTAS ++IP+STGAA+AV V+PEL+GKL G++ RVPT D
  // Sbjct: 178 SLTATQKTVDGPSHKDWRGGRTASGNIIPSSTGAAKAVGKVLPELQGKLTGMAFRVPTVD 237
  // Query: 241 VSLVDFTFVPQRDTTAEEINSVLKAAADTGDMTGVLGYTDEPLVSRDFYSDPHSSTVDSR 300
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  vGAPDH: GAP + NAD -> BPG + NADH; cytosol*Zymomonas_Glyceraldehyde_3_phosphate_dehydrogenase(vGAPDH_Vf, vGAPDH_KmGAP, vGAPDH_KmNAD, GAP, NAD, BPG, NADH, vGAPDH_Keq, vGAPDH_KmNADH, vGAPDH_KmbPG); vGAPDH is "7 Glyceraldehyde 3-phosphate dehydrogenase";  // kegg.reaction:R01061; ec-code:1.2.1.12; isHomologTo reactome:REACT_1847
    vGAPDH_Vf = 5.29997e4; vGAPDH_KmGAP = 292; vGAPDH_KmNAD = 132.638; vGAPDH_Keq = 0.04; vGAPDH_KmNADH = 106.747; vGAPDH_KmbPG = 8.82205;
  // Teusink 2000 Izteiksme
  // Km vērtības, Altintas 2005
  // Vf Ingram Osman 1987 Fig4.
  // Sekvence līdzīga Sacharomyces un Zymomonas.
  // >YCR012W_AWRI796 PGK1 ORF Verified [Sc strain AWRI796] 3-phosphoglycerate kinase, catalyzes transfer of high-energy phosphoryl groups from the acyl phosphate of 1,3-bisphosphoglycerate to ADP to produce ATP; key enzyme in glycolysis and gluconeogenesis
  // Length = 417
  // Score = 240.2 bits (668), Expect = 4.8e-66, P = 4.8e-66
  // Identities = 157/409 (38%), Positives = 221/409 (54%), Gaps = 22/409 (5%)
  // Query: 5 TLDDIGDVKGKRVLVREDLNVPMDGDRVTDDTRLRAAIPTVNELAEKGAKVLILA-HFGR 63
  // ++ D+ D+K KRV +R D NVP+DG ++T + R+ AA+PT+ + E + ++LA H GR
  // Sbjct: 8 SVQDL-DLKDKRVFIRVDFNVPLDGKKITSNQRIVAALPTIKYVLEHHPRYVVLASHLGR 66
  // Query: 64 PKGQPNPEMSLARIKDALAGVLGRPVHFINDIKGEAAAKAVDALNPGAVALLENTRFYAG 123
  // P G+ N + SLA + L +LG+ V F+ND G AV A PG+V LLEN R++
  // Sbjct: 67 PNGERNEKYSLAPVAKELQSLLGKDVTFLNDCVGPEVEAAVKASAPGSVILLENLRYHIE 126
  // Query: 124 EE-------------KND-PALAAEVAKLGDFYVNDAFSAAHRAHVSTEGLAHKLPA-FA 168
  // EE K D E++ L D Y+NDAF AHRAH S G LP A
  // Sbjct: 127 EEGSRKVDGQKVKASKEDVQKFRHELSSLADVYINDAFGTAHRAHSSMVGF--DLPQRAA 184
  // Query: 169 GRAMQKELEALEAALGKPTHPVAAVVGGAKVSTKLDVLTNLVSKVDHLIIGGGMANTFLA 228
  // G ++KEL+ AL PT P A++GGAKV+ K+ ++ NL+ KVD +IIGGGMA TF
  // Sbjct: 185 GFLLEKELKYFGKALENPTRPFLAILGGAKVADKIQLIDNLLDKVDSIIIGGGMAFTFKK 244
  // Query: 229 A-QGVDVGKSLCEHELKDTVKGIFAAAEKTGCKIHLPSDVVVAKEFKANPPIRTIPVSD- 286
  // + ++G S+ + + V + A+ G ++ LP D ++A F A+ +T+ +
  // Sbjct: 245 VLENTEIGDSIFDKAGAEIVPKLMEKAKAKGVEVVLPVDFIIADAFSADANTKTVTDKEG 304
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  vPGK: BPG + ADP -> P3G + ATP; cytosol*Zymomonas_3_phosphoglycerate_kinase(vPGK_Vf, vPGK_KmbPG, vPGK_KmADP, BPG, ADP, P3G, ATP, vPGK_Keq, vPGK_KmP3G, vPGK_KmATP); vPGK is "8 Phosphoglycerate kinase";  // ec-code:2.7.2.3; kegg.reaction:R01512; isHomologTo reactome:REACT_1771
    vPGK_Vf = 4.49901e4; vPGK_KmbPG = 4.48713; vPGK_KmADP = 517.458; vPGK_Keq = 3000; vPGK_KmP3G = 1500; vPGK_KmATP = 1100;
  // Teusink 2000 Izteiksme
  // Km 3PG, Pawluk et.al. (1986) bet Km 2PG Assumed Pawluk et.al. (1986)
  // Vf Ingram Osman 1987 Fig4. līdzīgas kā Teusink modelim.
  // Sekvence līdzīga Sacharomyces un Zymomonas.
  // Length = 248
  // Score = 231.8 bits (644), Expect = 1.7e-63, P = 1.7e-63
  // Identities = 125/230 (54%), Positives = 160/230 (69%), Gaps = 4/230 (1%)
  // Query: 1 MPTLVLSRHGQSEWNLENRFTGWWDVNLTEQGVQEATAGGKALAEKGFEFDIAFTSVLTR 60
  // MP LVL RHGQSEWN +N FTGW DV L+ +G QEA G+ L EK D+ +TS L+R
  // Sbjct: 1 MPKLVLVRHGQSEWNEKNLFTGWVDVKLSAKGQQEAARAGELLKEKKVYPDVLYTSKLSR 60
  // Query: 61 AIKTTNLILEAGKTLWVPTEKDWRLNERHYGGLTGLNKAETAAKHGEEQVHIWRRSYDVP 120
  // AI+T N+ LE LW+P + WRLNERHYG L G +KAET K GEE+ + +RRS+DVP
  // Sbjct: 61 AIQTANIALEKADRLWIPVNRSWRLNERHYGDLQGKDKAETLKKFGEEKFNTYRRSFDVP 120
  // Query: 121 PPPMEKGSKFDLSGDRRYDGVK---IPETESLKDTVARVLPYWEERIAPELKAGKRVLIG 177
  // PPP++ S F GD RY V +PETESL + R+LPYW++ IA +L +GK V+I
  // Sbjct: 121 PPPIDASSPFSQKGDERYKYVDPNVLPETESLALVIDRLLPYWQDVIAKDLLSGKTVMIA 180
  // Query: 178 AHGNSLRALVKHLSKLSDEEIVKFELPTGQPLVYELNDDLTP-KDRYFLN 226
  // AHGNSLR LVKHL +SD +I K +PTG PLV+EL+++L P K Y+L+
  // Sbjct: 181 AHGNSLRGLVKHLEGISDADIAKLNIPTGIPLVFELDENLKPSKPSYYLD 230
  vPGM: P3G -> P2G; cytosol*Zymomonas_Phosphoglycerate_mutase(vPGM_Vf, vPGM_KmP3G, P3G, P2G, KeqPGM, vPGM_KmP2G); vPGM is "9 Phosphoglycerate mutase";  // kegg.reaction:R01518; ec-code:5.4.2.1; isHomologTo reactome:REACT_576
    vPGM_Vf = 2.74542e4; vPGM_KmP3G = 1100; KeqPGM = 0.2; vPGM_KmP2G = 27.5065;
  // Teusink 2000 Izteiksme
  // Km 2-PG Pawluk et.al. (1986) KM PEP Pēc proporcijas no Teusink izrēķināts.
  // Vf Ingram Osman 1987 Fig4.
  // Sekvence līdzīga Sacharomyces un Zymomonas.
  // >YHR174W_LalvinQA23 ENO2 ORF Verified [Sc strain LalvinQA23] Enolase II, a phosphopyruvate hydratase that catalyzes the conversion of 2-phosphoglycerate to phosphoenolpyruvate during glycolysis and the reverse reaction during gluconeogenesis; expression is induced in response to glucose
  // Length = 438
  // Score = 356.7 bits (999), Expect = 4.0e-101, P = 4.0e-101
  // Identities = 220/435 (50%), Positives = 284/435 (65%), Gaps = 20/435 (4%)
  // Query: 3 AIVSIHGRQVVDSRGNPTVEVDVTLEDGSFGRAAVPSGASTGVHEAVELRDGDKTRWGGK 62
  // A+ ++ R V DSRGNPTVEV++T E G F R+ VPSGASTGVHEA+E+RD DK++W GK
  // Sbjct: 2 AVSKVYARSVYDSRGNPTVEVELTTEKGVF-RSIVPSGASTGVHEALEMRDEDKSKWMGK 60
  // Query: 63 GVTKAVHAVNNEIANAII--GLEAEDQELIDQTMIKLDGTPNKGKFGANAILGVSLXXXX 120
  // GV AV+ VNN IA A + L+ +DQ+ +D ++ LDGT NK K GANAILGVS+
  // Sbjct: 61 GVMNAVNNVNNVIAAAFVKANLDVKDQKAVDDFLLSLDGTANKSKLGANAILGVSMAAAR 120
  // Query: 121 XXXXXRGLPLYRYVGG-----TAAHVLPVPMMNIVNGGMHADNPIDFQEFMIAPVGASSI 175
  // + +PLY+++ T+ +VLPVP +N++NGG HA + QEFMIAP GA +
  // Sbjct: 121 AAAAEKNVPLYQHLADLSKSKTSPYVLPVPFLNVLNGGSHAGGALALQEFMIAPTGAKTF 180
  // Query: 176 NEAVRIGTEVFHTLKKELSAK--GMNT-NVGDEGGFAPXXXXXXXXXXFIVDSISKAGYK 232
  // EA+RIG+EV+H LK L+ K G + NVGDEGG AP IVD+I AG+
  // Sbjct: 181 AEAMRIGSEVYHNLKS-LTKKRYGASAGNVGDEGGVAPNIQTAEEALDLIVDAIKAAGHD 239
  // Query: 233 PGEDVFIALDAASSEFYNKDQNIYDLKG-EGRK---LTSAQLVDYYVELCGKYPIYSIED 288
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  vENO: P2G -> PEP; cytosol*Zymomonas_Enolase__1(vENO_Vf, P2G, PEP, vENO_Keq, vENO_KmP2G, vENO_KmPEP); vENO is "_10 Enolase";  // kegg.reaction:R00658; ec-code:4.2.1.11; isHomologTo reactome:REACT_1400
    vENO_Vf = 5457.26; vENO_Keq = 4; vENO_KmP2G = 80; vENO_KmPEP = 167.003;
  // Teusink 2000 Izteiksme
  // Km ņemts no Teusink Pawluk et.al. un rēķināts pēc Km proporcijas no Teusink.
  // Vf Ingram Osman 1987 Fig4. (Kaut gan 4 grafikā ir kļūda un tik pat labi Vmax ir GAP dehidrogenāzei)
  // Sekvence līdzīga Sacharomyces un Zymomonas.
  // >YAL038W_AWRI1631 CDC19 ORF Verified [Sc strain AWRI1631] Pyruvate kinase, functions as a homotetramer in glycolysis to convert phosphoenolpyruvate to pyruvate, the input for aerobic (TCA cycle) or anaerobic (glucose fermentation) respiration
  // Length = 501
  // Score = 223.0 bits (619), Expect = 7.4e-61, P = 7.4e-61
  // Identities = 162/483 (33%), Positives = 245/483 (50%), Gaps = 24/483 (4%)
  // Query: 10 RKVRVVSTLGPASSTAEQIRDRFLAGADVFRINMSHGTHDEKKVIVDNIRALEKEF-NRP 68
  // R+ ++ T+GP ++ E + AG ++ R+N SHG+++ K ++DN R E+ + RP
  // Sbjct: 19 RRTSIIGTIGPKTNNPETLVALRKAGLNIVRMNFSHGSYEYHKSVIDNARKSEELYPGRP 78
  // Query: 69 TTILFDLQGPKLRVGDFKEG---KVQLKEGQTFTFDQDPTLG-DETRVNLPHPEIFKALD 124
  // I D +GP++R G + FT D D+ + + + I K +
  // Sbjct: 79 LAIALDTKGPEIRTGTTTNDVDYPIPPNHEMIFTTDDKYAKACDDKIMYVDYKNITKVIS 138
  // Query: 125 KGHRLLLDDGKIVVRCVESSPTKIVTRVEV--PGPLSDHKGFNVPDVVIPLAALTPKDRK 182
  // G + +DDG + + +E K + +V+ G + HKG N+P + L AL+ KD++
  // Sbjct: 139 AGRIIYVDDGVLSFQVLEVVDDKTL-KVKALNAGKICSHKGVNLPGTDVDLPALSEKDKE 197
  // Query: 183 DLDFALQEKADWVALSFVQRVEDVIEAKELI--KGR-APLLVKLEKPAAIENLESILAAT 239
  // DL F ++ V SF++ DV+ +E++ +G+ ++VK+E + N + IL T
  // Sbjct: 198 DLRFGVKNGVHMVFASFIRTANDVLTIREVLGEQGKDVKIIVKIENQQGVNNFDEILKVT 257
  // Query: 240 DAVMVARGDLGVECLPESVPPTQKRIVERSRQLGKPVVVATAMLESMIKAPAPTRAEVSD 299
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  vPYK: PEP + ADP -> PYR + ATP; cytosol*Zymomonas_Pyruvate_kinase__1___1(vPYK_Vf, vPYK_KmPEP, vPYK_KmADP, PEP, ADP, PYR, ATP, vPYK_Keq, vPYK_KmPYR, vPYK_KmATP); vPYK is "_11 Pyruvate kinase";  // kegg.reaction:R00200; ec-code:2.7.1.40; isHomologTo reactome:REACT_1911
    vPYK_Vf = 88774; vPYK_KmPEP = 80; vPYK_KmADP = 170; vPYK_Keq = 5000; vPYK_KmPYR = 78.1046; vPYK_KmATP = 502.559;
  // Reakcija Altintas
  // Km Bringer Meyer et.al. 1986
  // Vmax Osman Ingram 1987
  // Sekvence nedaudz līdzīga Sacharomyces un Zymomonas
  // >YLR044C_PW5 PDC1 ORF Verified [Sc strain PW5] Major of three pyruvate decarboxylase isozymes, key enzyme in alcoholic fermentation, decarboxylates pyruvate to acetaldehyde; subject to glucose-, ethanol-, and autoregulation; involved in amino acid catabolism
  // Length = 564
  // Score = 182.8 bits (505), Expect = 8.9e-49, P = 8.9e-49
  // Identities = 147/568 (25%), Positives = 243/568 (42%), Gaps = 18/568 (3%)
  // Query: 4 TVGTYLAERLVQIGLKHHFAVAGDYXXXXXXXXXXXXXMEQVYCCNELNCGFSXXXXXXX 63
  // T+G YL ERL Q+ + F + GD+ M NELN ++
  // Sbjct: 5 TLGKYLFERLKQVNVNTVFGLPGDFNLSLLDKIYEVEGMRWAGNANELNAAYAADGYARI 64
  // Query: 64 XXXXXXVVTYSVGALSAFDAIGGAYAENLPVILISGAPNNNDXXXXXXXXXXXXKTDYHY 123
  // + T+ VG LSA + I G+YAE++ V+ + G P+ + D+
  // Sbjct: 65 KGMSCIITTFGVGELSALNGIAGSYAEHVGVLHVVGVPSISSQAKQLLLHHTLGNGDFTV 124
  // Query: 124 QLEMAKNITAAAEAIYTPEEAPAKIDHVIKTALREKKPVYLEIACNIASMPCAAPGPASA 183
  // M+ NI+ I APA+ID I+T ++PVYL + N+ + A +
  // Sbjct: 125 FHRMSANISETTAMITDIATAPAEIDRCIRTTYVTQRPVYLGLPANLVDLNVPAKLLQTP 184
  // Query: 184 L-FNDEASDEASLNAAVEETLKFIANRDKVAVLVGSKLRXXXXXXXXXXXXXXXXXXXXX 242
  // + + + +D S ++ L + + +L +
  // Sbjct: 185 IDMSLKPNDAESEKEVIDTILALVKDAKNPVILADACCSRHDVKAETKKLIDLTQFPAFV 244
  // Query: 243 XXXXKSFFPEENPHYIGTSWGEVSYPGVEKTMKEADAVIALAPVFNDYSTTGWTDIPDPK 302
  // K E++P Y G G +S P V++ ++ AD ++++ + +D++T ++ K
  // Sbjct: 245 TPMGKGSIDEQHPRYGGVYVGTLSKPEVKEAVESADLILSVGALLSDFNTGSFSYSYKTK 304
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  vPDC: PYR => ACE + CO2; cytosol*Zymomonas_Pyruvate_decarboxylase__1(vPDC_Vmax, PYR, vPDC_KmPYR); vPDC is "_12 Pyruvate decarboxylase";  // ec-code:4.1.1.1; kegg.reaction:R00224
    vPDC_Vmax = 6019.6; vPDC_KmPYR = 400;
  // Di Marco 1984 DGlucose transport system of Z. mobilis.
  // Km Vmax
  vGLT: GLCo -> GLCi; Zymomonas_Glucose_Fascilitator(vGLT_Vf, KmGLUCex, GLCo, GLCi, vGLT_Keq, vGLT_KmGLUCcy); vGLT is "1 Glucose import to cytosol";  // isHomologTo reactome:REACT_2092; isVersionOf GO:0046323
    vGLT_Vf = 0.0168; KmGLUCex = 5000; vGLT_Keq = 1; vGLT_KmGLUCcy = 5000;
  // Reaction Altintas et.al. 2005
  // Km Kinoshita et. al. 1985
  // Vmax calculated from Altintas.
  vADH: ACE + NADH -> NAD + ETOH; cytosol*Zymomonas_Alcohol_dehydrogenase__1(vADH_Vf, NADH, ACE, vADH_KiNADH, vADH_KmACET, vADH_KmNAD, NAD, ETOH, vADH_Keq, vADH_KmNADH, vADH_KiNAD, vADH_KmETOH); vADH is "_13_1 Alcohol dehydrogenase";  // isHomologTo reactome:REACT_799; isVersionOf kegg.reaction:R00746; isVersionOf ec-code:1.1.1.2
    vADH_Vf = 2011.9; vADH_KiNADH = 7.6; vADH_KmACET = 86; vADH_KmNAD = 73; vADH_Keq = 10000; vADH_KmNADH = 27; vADH_KiNAD = 24; vADH_KmETOH = 4800;
  vATP: ATP => ADP; cytosol*Zymomonas_ATP_ase__1(vATP_V, ATP, vATP_KmATP); vATP is "_14 ATP consumption";  // isVersionOf ec-code:3.6.1.3; isVersionOf GO:0016887
    vATP_V = 2904.53; vATP_KmATP = 500;
  // Scopes et. al. 1985- 6-Phosphogluconolactonase from Zymomonas mobilis
  // Km 20-30 mkM
  // Osman et.al. 1987 - Glucolytic flyx in Zymomonas mobilis:Enzyme and metabolite levels during fermentation.
  // Vmax from 3 reactions 2000
  // Vmax 950 calculated from Ingram And Altintas
  _4_Phospogluconolactonase: PGLACTON -> PGLUCONATE; cytosol*Zymomonas_6_Phosphogluconolactonase(_4_Phospogluconolactonase_Vf, _4_Phospogluconolactonase_KmPGLACTON, G6P, _4_Phospogluconolactonase_KiGLUC6P, PGLACTON, _4_Phospogluconolactonase_Keq, PGLUCONATE, KmPGLUCONAT);  // modifiers: G6P
    _4_Phospogluconolactonase_Vf = 7847.64; _4_Phospogluconolactonase_KmPGLACTON = 25; _4_Phospogluconolactonase_KiGLUC6P = 300; _4_Phospogluconolactonase_Keq = 6400; KmPGLUCONAT = 351.213;
  // Reaction Altintas, MM,
  // Km, Vmax Scopes Griffith Smith 1984
  _5_6_P_gluconate_dehydratase: PGLUCONATE -> KDPG; cytosol*Zymomonas_6_P_gluconate_dehydratase(_5_6_P_gluconate_dehydratase_Vf, PGLUCONATE, KmPGLUCONATE, P3G, KiP3G); _5_6_P_gluconate_dehydratase is "5 6-P-gluconate dehydratase";  // modifiers: P3G
    _5_6_P_gluconate_dehydratase_Vf = 4924.89; KmPGLUCONATE = 50; KiP3G = 2000;
  // Reaction Altintas et. al. 2005
  // Km Scopes 1983
  // Vmax - Assumed from Osman Ingram, 1987
  _6_KDPG__aldolase: KDPG -> GAP + PYR; cytosol*Zymomonas_KDPG__aldolase___1___1(_6_KDPG__aldolase_Vf, KDPG, KmKDPG, GAP, PYR, _6_KDPG__aldolase_Keq, _6_KDPG__aldolase_KmPYR, _6_KDPG__aldolase_KmGAP, KiGAP); _6_KDPG__aldolase is "6 KDPG aldolase";
    _6_KDPG__aldolase_Vf = 8561.73; KmKDPG = 250; _6_KDPG__aldolase_Keq = 1300; _6_KDPG__aldolase_KmPYR = 2993.74; _6_KDPG__aldolase_KmGAP = 368.638; KiGAP = 2996.41;
  _16_Ethanol_transport_to_periplasm: ETOH -> ETHANOLper; Zymomonas_Ethanol_transport(_16_Ethanol_transport_to_periplasm_k, ETOH, ETHANOLper);
    _16_Ethanol_transport_to_periplasm_k = 7;
  // Reaction Altintas et.al. 2005
  // Km Kinoshita et. al. 1985
  // Vmax calculated from Altintas.
  _13_2_Alcohol_dehydrogenase: ACE + NADH -> NAD + ETOH; cytosol*Zymomonas_Alcohol_dehydrogenase__1(_13_2_Alcohol_dehydrogenase_Vf, NADH, ACE, _13_2_Alcohol_dehydrogenase_KiNADH, _13_2_Alcohol_dehydrogenase_KmACET, _13_2_Alcohol_dehydrogenase_KmNAD, NAD, ETOH, _13_2_Alcohol_dehydrogenase_Keq, _13_2_Alcohol_dehydrogenase_KmNADH, _13_2_Alcohol_dehydrogenase_KiNAD, _13_2_Alcohol_dehydrogenase_KmETOH);
    _13_2_Alcohol_dehydrogenase_Vf = 9.29202e4; _13_2_Alcohol_dehydrogenase_KiNADH = 18; _13_2_Alcohol_dehydrogenase_KmACET = 1300; _13_2_Alcohol_dehydrogenase_KmNAD = 110; _13_2_Alcohol_dehydrogenase_Keq = 10000; _13_2_Alcohol_dehydrogenase_KmNADH = 12; _13_2_Alcohol_dehydrogenase_KiNAD = 140; _13_2_Alcohol_dehydrogenase_KmETOH = 27000;
  _3_Glucose_6_phosphate_dehydrogenase: G6P + NAD -> PGLACTON + NADH; cytosol*Zymomonas_Glucose_6_Phosphate_dehydrogenase__1(_3_Glucose_6_phosphate_dehydrogenase_Vf, G6P, _3_Glucose_6_phosphate_dehydrogenase_KmGLUC6P, NAD, _3_Glucose_6_phosphate_dehydrogenase_KmNAD, PGLACTON, NADH, _3_Glucose_6_phosphate_dehydrogenase_Keq, _3_Glucose_6_phosphate_dehydrogenase_KmPGLACTON, h, _3_Glucose_6_phosphate_dehydrogenase_KmNADH, PEP, KiPEP, s, ATP, _3_Glucose_6_phosphate_dehydrogenase_KmATP); _3_Glucose_6_phosphate_dehydrogenase is "3 Glucose 6-phosphate dehydrogenase";  // modifiers: PEP, ATP
    _3_Glucose_6_phosphate_dehydrogenase_Vf = 1.74839e4; _3_Glucose_6_phosphate_dehydrogenase_KmGLUC6P = 221.7; _3_Glucose_6_phosphate_dehydrogenase_KmNAD = 251.8; _3_Glucose_6_phosphate_dehydrogenase_Keq = 1.4; _3_Glucose_6_phosphate_dehydrogenase_KmPGLACTON = 2993.82; h = 1.75; _3_Glucose_6_phosphate_dehydrogenase_KmNADH = 2998.38; KiPEP = 14.1; s = 0.5; _3_Glucose_6_phosphate_dehydrogenase_KmATP = 1400;
  _15_Adenylate_Kinase: 2 ADP -> ATP + AMP; cytosol*Zymomonas_Adenylate_Kinase(_15_Adenylate_Kinase_Vf, _15_Adenylate_Kinase_KmADP, ADP, ATP, AMP, _15_Adenylate_Kinase_Keq, _15_Adenylate_Kinase_KmATP, KmAMP);
    _15_Adenylate_Kinase_Vf = 816; _15_Adenylate_Kinase_KmADP = 247; _15_Adenylate_Kinase_Keq = 0.5; _15_Adenylate_Kinase_KmATP = 195; KmAMP = 38;
  _18_Glucose_import_to_periplasm: $GLUCex -> GLCo; _18_Glucose_import_to_periplasm_k1*GLUCex - _18_Glucose_import_to_periplasm_k2*GLCo;
    _18_Glucose_import_to_periplasm_k1 = 1; _18_Glucose_import_to_periplasm_k2 = 1;
  _17_Ethanol_export_to_extracellular_space: ETHANOLper -> ETHANOLex; Zymomonas_Ethanol_transport(_17_Ethanol_export_to_extracellular_space_k, ETHANOLper, ETHANOLex);
    _17_Ethanol_export_to_extracellular_space_k = 7;
  _19_Pyruvate_export_to_periplasm: PYR => PYRper; Zymomonas_Acetaldehyde_export_3__1___1(_19_Pyruvate_export_to_periplasm_v, PYR, PYRper);
    _19_Pyruvate_export_to_periplasm_v = 3.2e-7;
  _20_Pyruvate_transport_to_extracellular_space: PYRper -> PYRex; _20_Pyruvate_transport_to_extracellular_space_k1*PYRper - _20_Pyruvate_transport_to_extracellular_space_k2*PYRex;
    _20_Pyruvate_transport_to_extracellular_space_k1 = 1; _20_Pyruvate_transport_to_extracellular_space_k2 = 1;
  _21_Periplasmic_Pyruvate_decarboxylase: PYRper => ACETper + CO2per; Zymomonas_Pyruvate_decarboxylase__1(_21_Periplasmic_Pyruvate_decarboxylase_Vmax, PYRper, _21_Periplasmic_Pyruvate_decarboxylase_KmPYR);
    _21_Periplasmic_Pyruvate_decarboxylase_Vmax = 0; _21_Periplasmic_Pyruvate_decarboxylase_KmPYR = 400;
  _23_Acetaldehyde_transport_to_extracellular_space: ACETper -> ACETex; extracellular*(_23_Acetaldehyde_transport_to_extracellular_space_k1*ACETper - _23_Acetaldehyde_transport_to_extracellular_space_k2*ACETex);
    _23_Acetaldehyde_transport_to_extracellular_space_k1 = 1; _23_Acetaldehyde_transport_to_extracellular_space_k2 = 1;
  _22_Acetaldehyde_export_to_periplasm: ACE -> ACETper; Zymomonas_Acetaldehyde_export_3__1___1(_22_Acetaldehyde_export_to_periplasm_v, ACE, ACETper);
    _22_Acetaldehyde_export_to_periplasm_v = 0.001;
  _24_Glucose_transport_to_periplasm: $GLUCex -> GLCo; _24_Glucose_transport_to_periplasm_k1*GLUCex - _24_Glucose_transport_to_periplasm_k2*GLCo;
    _24_Glucose_transport_to_periplasm_k1 = 1; _24_Glucose_transport_to_periplasm_k2 = 1;
  _25_CO2_export_to_periplasm: CO2 -> CO2per; _25_CO2_export_to_periplasm_k1*CO2 - _25_CO2_export_to_periplasm_k2*CO2per;
    _25_CO2_export_to_periplasm_k1 = 1; _25_CO2_export_to_periplasm_k2 = 1;
  _26_CO2_export_to_extracellular_space: CO2per => $CO2ex; extracellular*_26_CO2_export_to_extracellular_space_k1*CO2per;
    _26_CO2_export_to_extracellular_space_k1 = 1;
  _27_NADH_resp: NADH => NAD; cytosol*Henri_Michaelis_Menten__irreversible(NADH, Km, _27_NADH_resp_V);
    Km = 50; _27_NADH_resp_V = 59600;

  // Unit definitions:
  unit substance = 1e-6 mole;
end
